// SBML level 2 version 4

function Y_DL_b_r_0(k_R_b, k_I_b, I, Y_DL_b, Y_DD_b, Y_LL_b, k_N_b, N, K_ct_b, K_N_b, K_F_b, mF_b, n_b)
  -(k_R_b + k_I_b*I)*Y_DL_b + k_I_b*I*Y_DD_b + k_R_b*Y_LL_b - k_N_b*(N^K_ct_b/(N^K_ct_b + K_N_b))*(K_F_b/(mF_b^n_b + K_F_b))*Y_DL_b;
end

function cl_b_r_0(k_T_b, J_p_b, K_J_b, K_F_b, mF_b, n_b, gamma_cl_b, k_N_b, N, K_ct_b, K_N_b, cl_b)
  k_T_b*(J_p_b^2/(J_p_b^2 + K_J_b))*(K_F_b/(mF_b^n_b + K_F_b)) - (gamma_cl_b + k_N_b*(N^K_ct_b/(N^K_ct_b + K_N_b))*(K_F_b/(mF_b^n_b + K_F_b)))*cl_b;
end

function Y_DD_b_r_0(b_Y_b, K_F_b, mF_b, n_b, k_I_b, I, Y_DD_b, k_R_b, Y_LD_b, Y_DL_b, k_N_b, N, K_ct_b, K_N_b)
  b_Y_b*(K_F_b/(mF_b^n_b + K_F_b)) - 2*k_I_b*I*Y_DD_b + k_R_b*(Y_LD_b + Y_DL_b) - k_N_b*(N^K_ct_b/(N^K_ct_b + K_N_b))*(K_F_b/(mF_b^n_b + K_F_b))*Y_DD_b;
end

function Y_LD_b_r_0(k_R_b, k_I_b, I, Y_LD_b, Y_DD_b, Y_LL_b, k_N_b, N, K_ct_b, K_N_b, K_F_b, mF_b, n_b)
  -(k_R_b + k_I_b*I)*Y_LD_b + k_I_b*I*Y_DD_b + k_R_b*Y_LL_b - k_N_b*(N^K_ct_b/(N^K_ct_b + K_N_b))*(K_F_b/(mF_b^n_b + K_F_b))*Y_LD_b;
end

function BP_b_r_0(k_N_b, N, K_ct_b, K_N_b, K_F_b, mF_b, n_b, BP_b)
  k_N_b*(N^K_ct_b/(N^K_ct_b + K_N_b))*(K_F_b/(mF_b^n_b + K_F_b))*BP_b;
end

function Y_LL_d_r_0(k_R_d, I, Y_LL_d, k_I_d, Y_LD_d, Y_DL_d, k_N_d, N, K_ct_d, K_N_d, K_F_d, mF_d, n_d)
  -2*k_R_d*I*Y_LL_d + k_I_d*(Y_LD_d + Y_DL_d) - k_N_d*(N^K_ct_d/(N^K_ct_d + K_N_d))*(K_F_d/(mF_d^n_d + K_F_d))*Y_LL_d;
end

function J_p_b_r_0(k_K_b, Y_DD_b, J_b, k_H_b, J_p_b, k_p_b, Y_LD_b, Y_DL_b, Y_LL_b, k_N_b, N, K_ct_b, K_N_b, K_F_b, mF_b, n_b)
  k_K_b*Y_DD_b*J_b - k_H_b*J_p_b - k_p_b*(Y_LD_b + Y_DL_b + Y_LL_b)*J_p_b - k_N_b*(N^K_ct_b/(N^K_ct_b + K_N_b))*(K_F_b/(mF_b^n_b + K_F_b))*J_p_b;
end

function J_b_r_0(b_J_b, K_F_b, mF_b, n_b, k_K_b, Y_DD_b, J_b, k_H_b, J_p_b, k_p_b, Y_LD_b, Y_DL_b, Y_LL_b, k_N_b, N, K_ct_b, K_N_b)
  b_J_b*(K_F_b/(mF_b^n_b + K_F_b)) - k_K_b*Y_DD_b*J_b + k_H_b*J_p_b + k_p_b*(Y_LD_b + Y_DL_b + Y_LL_b)*J_p_b - k_N_b*(N^K_ct_b/(N^K_ct_b + K_N_b))*(K_F_b/(mF_b^n_b + K_F_b))*J_b;
end

function Y_LL_b_r_0(k_R_b, Y_LL_b, k_I_b, I, Y_LD_b, Y_DL_b, k_N_b, N, K_ct_b, K_N_b, K_F_b, mF_b, n_b)
  -2*k_R_b*Y_LL_b + k_I_b*I*(Y_LD_b + Y_DL_b) - k_N_b*(N^K_ct_b/(N^K_ct_b + K_N_b))*(K_F_b/(mF_b^n_b + K_F_b))*Y_LL_b;
end

function Y_DD_d_r_0(b_Y_d, K_F_d, mF_d, n_d, k_I_d, Y_DD_d, k_R_d, I, Y_LD_d, Y_DL_d, k_N_d, N, K_ct_d, K_N_d)
  b_Y_d*(K_F_d/(mF_d^n_d + K_F_d)) - 2*k_I_d*Y_DD_d + k_R_d*I*(Y_LD_d + Y_DL_d) - k_N_d*(N^K_ct_d/(N^K_ct_d + K_N_d))*(K_F_d/(mF_d^n_d + K_F_d))*Y_DD_d;
end

function mE_b_r_0(k_gamma_b, K_gamma_b, cl_b, K_F_b, mF_b, n_b, gamma_mE_b, k_N_b, N, K_ct_b, K_N_b, mE_b, alpha_TH_b)
  k_gamma_b*(K_gamma_b/(cl_b^4 + K_gamma_b))*(K_F_b/(mF_b^n_b + K_F_b)) - (gamma_mE_b + k_N_b*(N^K_ct_b/(N^K_ct_b + K_N_b))*(K_F_b/(mF_b^n_b + K_F_b)))*mE_b - alpha_TH_b*mF_b*mE_b;
end

function mF_b_r_0(k_T_b, J_p_b, K_J_b, K_F_b, mF_b, n_b, k_N_b, N, K_ct_b, K_N_b, alpha_TH_b, mE_b)
  k_T_b*(J_p_b^2/(J_p_b^2 + K_J_b))*(K_F_b/(mF_b^n_b + K_F_b)) - k_N_b*(N^K_ct_b/(N^K_ct_b + K_N_b))*(K_F_b/(mF_b^n_b + K_F_b))*mF_b - 2*alpha_TH_b*mF_b*mE_b;
end

function Y_DL_d_r_0(k_R_d, I, k_I_d, Y_DL_d, Y_DD_d, Y_LL_d, k_N_d, N, K_ct_d, K_N_d, K_F_d, mF_d, n_d)
  -(k_R_d*I + k_I_d)*Y_DL_d + k_I_d*Y_DD_d + k_R_d*I*Y_LL_d - k_N_d*(N^K_ct_d/(N^K_ct_d + K_N_d))*(K_F_d/(mF_d^n_d + K_F_d))*Y_DL_d;
end

function mE_d_r_0(k_gamma_d, K_gamma_d, cl_d, K_F_d, mF_d, n_d, gamma_mE_d, k_N_d, N, K_ct_d, K_N_d, mE_d, alpha_TH_d)
  k_gamma_d*(K_gamma_d/(cl_d^4 + K_gamma_d))*(K_F_d/(mF_d^n_d + K_F_d)) - (gamma_mE_d + k_N_d*(N^K_ct_d/(N^K_ct_d + K_N_d))*(K_F_d/(mF_d^n_d + K_F_d)))*mE_d - alpha_TH_d*mF_d*mE_d;
end

function BP_d_r_0(k_N_d, N, K_ct_d, K_N_d, K_F_d, mF_d, n_d, BP_d)
  k_N_d*(N^K_ct_d/(N^K_ct_d + K_N_d))*(K_F_d/(mF_d^n_d + K_F_d))*BP_d;
end

function Y_LD_d_r_0(k_R_d, I, k_I_d, Y_LD_d, Y_DD_d, Y_LL_d, k_N_d, N, K_ct_d, K_N_d, K_F_d, mF_d, n_d)
  -(k_R_d*I + k_I_d)*Y_LD_d + k_I_d*Y_DD_d + k_R_d*I*Y_LL_d - k_N_d*(N^K_ct_d/(N^K_ct_d + K_N_d))*(K_F_d/(mF_d^n_d + K_F_d))*Y_LD_d;
end

function J_p_d_r_0(k_K_d, Y_DD_d, J_d, k_H_d, J_p_d, k_p_d, Y_LD_d, Y_DL_d, Y_LL_d, k_N_d, N, K_ct_d, K_N_d, K_F_d, mF_d, n_d)
  k_K_d*Y_DD_d*J_d - k_H_d*J_p_d - k_p_d*(Y_LD_d + Y_DL_d + Y_LL_d)*J_p_d - k_N_d*(N^K_ct_d/(N^K_ct_d + K_N_d))*(K_F_d/(mF_d^n_d + K_F_d))*J_p_d;
end

function N_r_0(delta_b, k_N_b, N, K_ct_b, K_N_b, K_F_b, mF_b, n_b, BP_b, delta_d, k_N_d, K_ct_d, K_N_d, K_F_d, mF_d, n_d, BP_d)
  delta_b*k_N_b*(N^K_ct_b/(N^K_ct_b + K_N_b))*(K_F_b/(mF_b^n_b + K_F_b))*BP_b + delta_d*k_N_d*(N^K_ct_d/(N^K_ct_d + K_N_d))*(K_F_d/(mF_d^n_d + K_F_d))*BP_d;
end

function mF_d_r_0(k_T_d, J_p_d, K_J_d, K_F_d, mF_d, n_d, k_N_d, N, K_ct_d, K_N_d, alpha_TH_d, mE_d)
  k_T_d*(J_p_d^2/(J_p_d^2 + K_J_d))*(K_F_d/(mF_d^n_d + K_F_d)) - k_N_d*(N^K_ct_d/(N^K_ct_d + K_N_d))*(K_F_d/(mF_d^n_d + K_F_d))*mF_d - 2*alpha_TH_d*mF_d*mE_d;
end

function J_d_r_0(b_J_d, K_F_d, mF_d, n_d, k_K_d, Y_DD_d, J_d, k_H_d, J_p_d, k_p_d, Y_LD_d, Y_DL_d, Y_LL_d, k_N_d, N, K_ct_d, K_N_d)
  b_J_d*(K_F_d/(mF_d^n_d + K_F_d)) - k_K_d*Y_DD_d*J_d + k_H_d*J_p_d + k_p_d*(Y_LD_d + Y_DL_d + Y_LL_d)*J_p_d - k_N_d*(N^K_ct_d/(N^K_ct_d + K_N_d))*(K_F_d/(mF_d^n_d + K_F_d))*J_d;
end

function cl_d_r_0(k_T_d, J_p_d, K_J_d, K_F_d, mF_d, n_d, gamma_cl_d, k_N_d, N, K_ct_d, K_N_d, cl_d)
  k_T_d*(J_p_d^2/(J_p_d^2 + K_J_d))*(K_F_d/(mF_d^n_d + K_F_d)) - (gamma_cl_d + k_N_d*(N^K_ct_d/(N^K_ct_d + K_N_d))*(K_F_d/(mF_d^n_d + K_F_d)))*cl_d;
end

model BlueTA_DarkTA()

  // Compartments:
  compartment compartment = 1;

  // Species:
  species Y_DD_b in compartment = 0.8568957;
  species Y_LD_b in compartment = 0.0004735643;
  species Y_DL_b in compartment = 0.005664695;
  species Y_LL_b in compartment = 0.1064262;
  species J_b in compartment = 3.993046;
  species J_p_b in compartment = 0.001156905;
  species cl_b in compartment = 5.127098e-7;
  species mF_b in compartment = 2.040437e-5;
  species mE_b in compartment = 0.0001070197;
  species Y_DD_d in compartment = 0.002548802;
  species Y_LD_d in compartment = 0.001879395;
  species Y_DL_d in compartment = 0.001273887;
  species Y_LL_d in compartment = 0.001871629;
  species J_d in compartment = 17.18258;
  species J_p_d in compartment = 1.249483e-6;
  species cl_d in compartment = 1.446542e-10;
  species mF_d in compartment = 7.507994e-8;
  species mE_d in compartment = 5.7288e-5;
  species BP_b in compartment = 26910;
  species BP_d in compartment = 26860;
  species N in compartment = 5;

  // Parameters:
  b_Y_b = 346.4655;
  k_I_b = 1.22504;
  k_R_b = 0.2733264;
  b_J_b = 14.10033;
  k_K_b = 5.736015;
  k_H_b = 6.340226e-9;
  k_p_b = 29.83483;
  k_T_b = 1.871458;
  K_J_b = 0.3521965;
  gamma_cl_b = 7.014389e-5;
  K_F_b = 0.008465387;
  n_b = 1.026222;
  k_N_b = 3.265709;
  K_N_b = 83.35242;
  alpha_TH_b = 6.481709e10;
  gamma_mE_b = 1472.266;
  k_gamma_b = 0.689429045;
  K_gamma_b = 1480510;
  delta_b = 1.346e-6;
  K_ct_b = 2.68046665;
  b_Y_d = 7986.322;
  k_I_d = 0.3859422;
  k_R_d = 3.758142;
  b_J_d = 45.11804;
  k_K_d = 478.701;
  k_H_d = 1.611141e-5;
  k_p_d = 4114.11;
  k_T_d = 11.05643;
  K_J_d = 140.0644;
  gamma_cl_d = 0.00741811;
  K_F_d = 10.6497;
  n_d = 134.4869;
  k_N_d = 3.324283;
  K_N_d = 69.1281;
  alpha_TH_d = 3.113997e7;
  gamma_mE_d = 0.00834139;
  k_gamma_d = 6.936727e-10;
  K_gamma_d = 2.803174e-7;
  delta_d = 1.177695e-6;
  K_ct_d = 2.72210663;
  I = 0;
  ID_batch = 0;
  ID_batch_input = 1;

  // Reactions:
  Y_DD_b_r: => Y_DD_b; compartment*Y_DD_b_r_0(b_Y_b, K_F_b, mF_b, n_b, k_I_b, I, Y_DD_b, k_R_b, Y_LD_b, Y_DL_b, k_N_b, N, K_ct_b, K_N_b);  // modifiers: mF_b, Y_LD_b, Y_DL_b, N
  Y_LD_b_r: => Y_LD_b; compartment*Y_LD_b_r_0(k_R_b, k_I_b, I, Y_LD_b, Y_DD_b, Y_LL_b, k_N_b, N, K_ct_b, K_N_b, K_F_b, mF_b, n_b);  // modifiers: Y_DD_b, Y_LL_b, N, mF_b
  Y_DL_b_r: => Y_DL_b; compartment*Y_DL_b_r_0(k_R_b, k_I_b, I, Y_DL_b, Y_DD_b, Y_LL_b, k_N_b, N, K_ct_b, K_N_b, K_F_b, mF_b, n_b);  // modifiers: Y_DD_b, Y_LL_b, N, mF_b
  Y_LL_b_r: => Y_LL_b; compartment*Y_LL_b_r_0(k_R_b, Y_LL_b, k_I_b, I, Y_LD_b, Y_DL_b, k_N_b, N, K_ct_b, K_N_b, K_F_b, mF_b, n_b);  // modifiers: Y_LD_b, Y_DL_b, N, mF_b
  J_b_r: => J_b; compartment*J_b_r_0(b_J_b, K_F_b, mF_b, n_b, k_K_b, Y_DD_b, J_b, k_H_b, J_p_b, k_p_b, Y_LD_b, Y_DL_b, Y_LL_b, k_N_b, N, K_ct_b, K_N_b);  // modifiers: mF_b, Y_DD_b, J_p_b, Y_LD_b, Y_DL_b, Y_LL_b, N
  J_p_b_r: => J_p_b; compartment*J_p_b_r_0(k_K_b, Y_DD_b, J_b, k_H_b, J_p_b, k_p_b, Y_LD_b, Y_DL_b, Y_LL_b, k_N_b, N, K_ct_b, K_N_b, K_F_b, mF_b, n_b);  // modifiers: Y_DD_b, J_b, Y_LD_b, Y_DL_b, Y_LL_b, N, mF_b
  cl_b_r: => cl_b; compartment*cl_b_r_0(k_T_b, J_p_b, K_J_b, K_F_b, mF_b, n_b, gamma_cl_b, k_N_b, N, K_ct_b, K_N_b, cl_b);  // modifiers: J_p_b, mF_b, N
  mF_b_r: => mF_b; compartment*mF_b_r_0(k_T_b, J_p_b, K_J_b, K_F_b, mF_b, n_b, k_N_b, N, K_ct_b, K_N_b, alpha_TH_b, mE_b);  // modifiers: J_p_b, N, mE_b
  mE_b_r: => mE_b; compartment*mE_b_r_0(k_gamma_b, K_gamma_b, cl_b, K_F_b, mF_b, n_b, gamma_mE_b, k_N_b, N, K_ct_b, K_N_b, mE_b, alpha_TH_b);  // modifiers: cl_b, mF_b, N
  BP_b_r: => BP_b; compartment*BP_b_r_0(k_N_b, N, K_ct_b, K_N_b, K_F_b, mF_b, n_b, BP_b);  // modifiers: N, mF_b
  Y_DD_d_r: => Y_DD_d; compartment*Y_DD_d_r_0(b_Y_d, K_F_d, mF_d, n_d, k_I_d, Y_DD_d, k_R_d, I, Y_LD_d, Y_DL_d, k_N_d, N, K_ct_d, K_N_d);  // modifiers: mF_d, Y_LD_d, Y_DL_d, N
  Y_LD_d_r: => Y_LD_d; compartment*Y_LD_d_r_0(k_R_d, I, k_I_d, Y_LD_d, Y_DD_d, Y_LL_d, k_N_d, N, K_ct_d, K_N_d, K_F_d, mF_d, n_d);  // modifiers: Y_DD_d, Y_LL_d, N, mF_d
  Y_DL_d_r: => Y_DL_d; compartment*Y_DL_d_r_0(k_R_d, I, k_I_d, Y_DL_d, Y_DD_d, Y_LL_d, k_N_d, N, K_ct_d, K_N_d, K_F_d, mF_d, n_d);  // modifiers: Y_DD_d, Y_LL_d, N, mF_d
  Y_LL_d_r: => Y_LL_d; compartment*Y_LL_d_r_0(k_R_d, I, Y_LL_d, k_I_d, Y_LD_d, Y_DL_d, k_N_d, N, K_ct_d, K_N_d, K_F_d, mF_d, n_d);  // modifiers: Y_LD_d, Y_DL_d, N, mF_d
  J_d_r: => J_d; compartment*J_d_r_0(b_J_d, K_F_d, mF_d, n_d, k_K_d, Y_DD_d, J_d, k_H_d, J_p_d, k_p_d, Y_LD_d, Y_DL_d, Y_LL_d, k_N_d, N, K_ct_d, K_N_d);  // modifiers: mF_d, Y_DD_d, J_p_d, Y_LD_d, Y_DL_d, Y_LL_d, N
  J_p_d_r: => J_p_d; compartment*J_p_d_r_0(k_K_d, Y_DD_d, J_d, k_H_d, J_p_d, k_p_d, Y_LD_d, Y_DL_d, Y_LL_d, k_N_d, N, K_ct_d, K_N_d, K_F_d, mF_d, n_d);  // modifiers: Y_DD_d, J_d, Y_LD_d, Y_DL_d, Y_LL_d, N, mF_d
  cl_d_r: => cl_d; compartment*cl_d_r_0(k_T_d, J_p_d, K_J_d, K_F_d, mF_d, n_d, gamma_cl_d, k_N_d, N, K_ct_d, K_N_d, cl_d);  // modifiers: J_p_d, mF_d, N
  mF_d_r: => mF_d; compartment*mF_d_r_0(k_T_d, J_p_d, K_J_d, K_F_d, mF_d, n_d, k_N_d, N, K_ct_d, K_N_d, alpha_TH_d, mE_d);  // modifiers: J_p_d, N, mE_d
  mE_d_r: => mE_d; compartment*mE_d_r_0(k_gamma_d, K_gamma_d, cl_d, K_F_d, mF_d, n_d, gamma_mE_d, k_N_d, N, K_ct_d, K_N_d, mE_d, alpha_TH_d);  // modifiers: cl_d, mF_d, N
  BP_d_r: => BP_d; compartment*BP_d_r_0(k_N_d, N, K_ct_d, K_N_d, K_F_d, mF_d, n_d, BP_d);  // modifiers: N, mF_d
  N_r: N => ; compartment*N_r_0(delta_b, k_N_b, N, K_ct_b, K_N_b, K_F_b, mF_b, n_b, BP_b, delta_d, k_N_d, K_ct_d, K_N_d, K_F_d, mF_d, n_d, BP_d);  // modifiers: mF_b, BP_b, mF_d, BP_d

  // Unit definitions:
  unit length = metre;
  unit area = metre^2;
  unit volume = litre;
  unit time = second;
  unit substance = mole;
end
