// SBML level 2 version 4

function _19k_0(delta, k_N, N, K_ct, K_N, K_F, mF, n, BP_b)
  delta*k_N*(N^K_ct/(N^K_ct + K_N))*(K_F/(mF^n + K_F))*BP_b;
end

function _19h_0(k_T, J_p, K_J, K_F, mF, n, k_N, N, K_ct, K_N, alpha_TH, mE)
  k_T*(J_p^2/(J_p^2 + K_J))*(K_F/(mF^n + K_F)) - k_N*(N^K_ct/(N^K_ct + K_N))*(K_F/(mF^n + K_F))*mF - 2*alpha_TH*mF*mE;
end

function _19g_0(k_T, J_p, K_J, K_F, mF, n, gamma_cl, k_N, N, K_ct, K_N, cl)
  k_T*(J_p^2/(J_p^2 + K_J))*(K_F/(mF^n + K_F)) - (gamma_cl + k_N*(N^K_ct/(N^K_ct + K_N))*(K_F/(mF^n + K_F)))*cl;
end

function _19i_0(k_gamma, K_gamma, cl, K_F, mF, n, gamma_mE, k_N, N, K_ct, K_N, mE, alpha_TH)
  k_gamma*(K_gamma/(cl^4 + K_gamma))*(K_F/(mF^n + K_F)) - (gamma_mE + k_N*(N^K_ct/(N^K_ct + K_N))*(K_F/(mF^n + K_F)))*mE - alpha_TH*mF*mE;
end

function _19a_0(b_Y, K_F, mF, n, k_I, Y_DD, k_R, I, Y_LD, Y_DL, k_N, N, K_ct, K_N)
  b_Y*(K_F/(mF^n + K_F)) - 2*k_I*Y_DD + k_R*I*(Y_LD + Y_DL) - k_N*(N^K_ct/(N^K_ct + K_N))*(K_F/(mF^n + K_F))*Y_DD;
end

function _19b_0(k_R, I, k_I, Y_LD, Y_DD, Y_LL, k_N, N, K_ct, K_N, K_F, mF, n)
  -(k_R*I + k_I)*Y_LD + k_I*Y_DD + k_R*I*Y_LL - k_N*(N^K_ct/(N^K_ct + K_N))*(K_F/(mF^n + K_F))*Y_LD;
end

function _19c_0(k_R, I, k_I, Y_DL, Y_DD, Y_LL, k_N, N, K_ct, K_N, K_F, mF, n)
  -(k_R*I + k_I)*Y_DL + k_I*Y_DD + k_R*I*Y_LL - k_N*(N^K_ct/(N^K_ct + K_N))*(K_F/(mF^n + K_F))*Y_DL;
end

function _19d_0(k_R, I, Y_LL, k_I, Y_LD, Y_DL, k_N, N, K_ct, K_N, K_F, mF, n)
  -2*k_R*I*Y_LL + k_I*(Y_LD + Y_DL) - k_N*(N^K_ct/(N^K_ct + K_N))*(K_F/(mF^n + K_F))*Y_LL;
end

function _19e_0(b_J, K_F, mF, n, k_K, Y_DD, J, k_H, J_p, k_p, Y_LD, Y_DL, Y_LL, k_N, N, K_ct, K_N)
  b_J*(K_F/(mF^n + K_F)) - k_K*Y_DD*J + k_H*J_p + k_p*(Y_LD + Y_DL + Y_LL)*J_p - k_N*(N^K_ct/(N^K_ct + K_N))*(K_F/(mF^n + K_F))*J;
end

function _19f_0(k_K, Y_DD, J, k_H, J_p, k_p, Y_LD, Y_DL, Y_LL, k_N, N, K_ct, K_N, K_F, mF, n)
  k_K*Y_DD*J - k_H*J_p - k_p*(Y_LD + Y_DL + Y_LL)*J_p - k_N*(N^K_ct/(N^K_ct + K_N))*(K_F/(mF^n + K_F))*J_p;
end

function _19j_0(k_N, N, K_ct, K_N, K_F, mF, n, BP_b)
  k_N*(N^K_ct/(N^K_ct + K_N))*(K_F/(mF^n + K_F))*BP_b;
end

model mechanistic_DarkTA()

  // Compartments:
  compartment compartment = 1;

  // Species:
  species Y_DD in compartment = 0.0003960437;
  species Y_LD in compartment = 0.001396711;
  species Y_DL in compartment = 0.001643426;
  species Y_LL in compartment = 0.037195;
  species J in compartment = 9.851398;
  species J_p in compartment = 1.699857e-6;
  species cl in compartment = 4.591503e-10;
  species BP_b in compartment = 0.01;
  species N in compartment = 5;
  species mF in compartment = 5.071567e-8;
  species mE in compartment = 0.001117788;

  // Parameters:
  b_Y = 212.9822;
  k_I = 0.108208;
  k_R = 2.315123;
  b_J = 31.90498;
  k_K = 60.6356665;
  k_H = 3.970434e-5;
  k_p = 982.3977;
  k_T = 1.748685;
  K_J = 80.99768;
  gamma_cl = 0.003212908;
  K_F = 86.85692;
  n = 17.78305;
  k_N = 7.837652;
  K_N = 34.27236;
  alpha_TH = 1.776393e8;
  gamma_mE = 0.01455977;
  k_gamma = 3.096753e-8;
  K_gamma = 2.803871e-8;
  delta = 0.958667794;
  K_ct = 0.8681815;
  I = 0;
  ID_batch = 0;

  // Reactions:
  _19a: => Y_DD; compartment*_19a_0(b_Y, K_F, mF, n, k_I, Y_DD, k_R, I, Y_LD, Y_DL, k_N, N, K_ct, K_N);  // modifiers: mF, Y_LD, Y_DL, N
  _19b: => Y_LD; compartment*_19b_0(k_R, I, k_I, Y_LD, Y_DD, Y_LL, k_N, N, K_ct, K_N, K_F, mF, n);  // modifiers: Y_DD, Y_LL, N, mF
  _19c: => Y_DL; compartment*_19c_0(k_R, I, k_I, Y_DL, Y_DD, Y_LL, k_N, N, K_ct, K_N, K_F, mF, n);  // modifiers: Y_DD, Y_LL, N, mF
  _19d: => Y_LL; compartment*_19d_0(k_R, I, Y_LL, k_I, Y_LD, Y_DL, k_N, N, K_ct, K_N, K_F, mF, n);  // modifiers: Y_LD, Y_DL, N, mF
  _19e: => J; compartment*_19e_0(b_J, K_F, mF, n, k_K, Y_DD, J, k_H, J_p, k_p, Y_LD, Y_DL, Y_LL, k_N, N, K_ct, K_N);  // modifiers: mF, Y_DD, J_p, Y_LD, Y_DL, Y_LL, N
  _19f: => J_p; compartment*_19f_0(k_K, Y_DD, J, k_H, J_p, k_p, Y_LD, Y_DL, Y_LL, k_N, N, K_ct, K_N, K_F, mF, n);  // modifiers: Y_DD, J, Y_LD, Y_DL, Y_LL, N, mF
  _19g: => cl; compartment*_19g_0(k_T, J_p, K_J, K_F, mF, n, gamma_cl, k_N, N, K_ct, K_N, cl);  // modifiers: J_p, mF, N
  _19h: => mF; compartment*_19h_0(k_T, J_p, K_J, K_F, mF, n, k_N, N, K_ct, K_N, alpha_TH, mE);  // modifiers: J_p, N, mE
  _19i: => mE; compartment*_19i_0(k_gamma, K_gamma, cl, K_F, mF, n, gamma_mE, k_N, N, K_ct, K_N, mE, alpha_TH);  // modifiers: cl, mF, N
  _19j: => BP_b; compartment*_19j_0(k_N, N, K_ct, K_N, K_F, mF, n, BP_b);  // modifiers: N, mF
  _19k: N => ; compartment*_19k_0(delta, k_N, N, K_ct, K_N, K_F, mF, n, BP_b);  // modifiers: mF, BP_b

  // Unit definitions:
  unit length = metre;
  unit area = metre^2;
  unit volume = litre;
  unit time = second;
  unit substance = mole;
end
