// SBML level 2 version 4

function _8h_0(k_T, J_p, K_J, K_F, mF, n, k_N, N, K_ct, K_N, alpha_TH, mE)
  k_T*(J_p^2/(J_p^2 + K_J))*(K_F/(mF^n + K_F)) - k_N*(N^K_ct/(N^K_ct + K_N))*(K_F/(mF^n + K_F))*mF - 2*alpha_TH*mF*mE;
end

function _8k_0(delta, k_N, N, K_ct, K_N, K_F, mF, n, BP_b)
  delta*k_N*(N^K_ct/(N^K_ct + K_N))*(K_F/(mF^n + K_F))*BP_b;
end

function _8c_0(k_R, I, b_D, k_I, Y_DL, Y_DD, Y_LL, k_N, N, K_ct, K_N, K_F, mF, n)
  -(k_R*(I + b_D) + k_I*(1 - I))*Y_DL + k_I*(1 - I)*Y_DD + k_R*(I + b_D)*Y_LL - k_N*(N^K_ct/(N^K_ct + K_N))*(K_F/(mF^n + K_F))*Y_DL;
end

function _8e_0(b_J, K_F, mF, n, k_K, Y_DD, J, k_H, J_p, k_p, Y_LD, Y_DL, Y_LL, k_N, N, K_ct, K_N)
  b_J*(K_F/(mF^n + K_F)) - k_K*Y_DD*J + k_H*J_p + k_p*(Y_LD + Y_DL + Y_LL)*J_p - k_N*(N^K_ct/(N^K_ct + K_N))*(K_F/(mF^n + K_F))*J;
end

function _8a_0(b_Y, K_F, mF, n, k_I, I, Y_DD, k_R, b_D, Y_LD, Y_DL, k_N, N, K_ct, K_N)
  b_Y*(K_F/(mF^n + K_F)) - 2*k_I*(1 - I)*Y_DD + k_R*(I + b_D)*(Y_LD + Y_DL) - k_N*(N^K_ct/(N^K_ct + K_N))*(K_F/(mF^n + K_F))*Y_DD;
end

function _8d_0(k_R, I, b_D, Y_LL, k_I, Y_LD, Y_DL, k_N, N, K_ct, K_N, K_F, mF, n)
  -2*k_R*(I + b_D)*Y_LL + k_I*(1 - I)*(Y_LD + Y_DL) - k_N*(N^K_ct/(N^K_ct + K_N))*(K_F/(mF^n + K_F))*Y_LL;
end

function _8b_0(k_R, I, b_D, k_I, Y_LD, Y_DD, Y_LL, k_N, N, K_ct, K_N, K_F, mF, n)
  -(k_R*(I + b_D) + k_I*(1 - I))*Y_LD + k_I*(1 - I)*Y_DD + k_R*(I + b_D)*Y_LL - k_N*(N^K_ct/(N^K_ct + K_N))*(K_F/(mF^n + K_F))*Y_LD;
end

function _8g_0(k_T, J_p, K_J, K_F, mF, n, gamma_cl, k_N, N, K_ct, K_N, cl)
  k_T*(J_p^2/(J_p^2 + K_J))*(K_F/(mF^n + K_F)) - (gamma_cl + k_N*(N^K_ct/(N^K_ct + K_N))*(K_F/(mF^n + K_F)))*cl;
end

function _8f_0(k_K, Y_DD, J, k_H, J_p, k_p, Y_LD, Y_DL, Y_LL, k_N, N, K_ct, K_N, K_F, mF, n)
  k_K*Y_DD*J - k_H*J_p - k_p*(Y_LD + Y_DL + Y_LL)*J_p - k_N*(N^K_ct/(N^K_ct + K_N))*(K_F/(mF^n + K_F))*J_p;
end

function _8i_0(k_gamma, K_gamma, cl, K_F, mF, n, gamma_mE, k_N, N, K_ct, K_N, mE, alpha_TH)
  k_gamma*(K_gamma/(cl^4 + K_gamma))*(K_F/(mF^n + K_F)) - (gamma_mE + k_N*(N^K_ct/(N^K_ct + K_N))*(K_F/(mF^n + K_F)))*mE - alpha_TH*mF*mE;
end

function _8j_0(k_N, N, K_ct, K_N, K_F, mF, n, BP_b)
  k_N*(N^K_ct/(N^K_ct + K_N))*(K_F/(mF^n + K_F))*BP_b;
end

model mechanistic_NIR()

  // Compartments:
  compartment compartment = 1;

  // Species:
  species Y_DD in compartment = 5.163062e-5;
  species Y_LD in compartment = 0.001431785;
  species Y_DL in compartment = 0.00282214;
  species Y_LL in compartment = 41.52443;
  species J in compartment = 86.48512;
  species J_p in compartment = 0.0002698195;
  species cl in compartment = 5.745637e-9;
  species BP_b in compartment = 0.01;
  species N in compartment = 5;
  species mF in compartment = 1.610376e-7;
  species mE in compartment = 0.001001691;

  // Parameters:
  b_Y = 0.09572064;
  k_I = 1.631002e-10;
  k_R = 0.2109536;
  b_J = 1.21976;
  k_K = 0.0360656;
  k_H = 7.91819e-6;
  k_p = 8.49438;
  k_T = 2.819052;
  K_J = 0.1020534;
  gamma_cl = 8.263909e-6;
  K_F = 0.01549362;
  n = 0.6689005;
  k_N = 1.260793;
  K_N = 4.09899;
  alpha_TH = 4.017365e10;
  gamma_mE = 22.64163;
  k_gamma = 2.322368e-5;
  K_gamma = 1.845008e-6;
  delta = 0.944985695;
  K_ct = 1.188256;
  b_D = 1.044315e-10;
  I = 0;
  ID_batch = 0;

  // Reactions:
  _8a: => Y_DD; compartment*_8a_0(b_Y, K_F, mF, n, k_I, I, Y_DD, k_R, b_D, Y_LD, Y_DL, k_N, N, K_ct, K_N);  // modifiers: mF, Y_LD, Y_DL, N
  _8b: => Y_LD; compartment*_8b_0(k_R, I, b_D, k_I, Y_LD, Y_DD, Y_LL, k_N, N, K_ct, K_N, K_F, mF, n);  // modifiers: Y_DD, Y_LL, N, mF
  _8c: => Y_DL; compartment*_8c_0(k_R, I, b_D, k_I, Y_DL, Y_DD, Y_LL, k_N, N, K_ct, K_N, K_F, mF, n);  // modifiers: Y_DD, Y_LL, N, mF
  _8d: => Y_LL; compartment*_8d_0(k_R, I, b_D, Y_LL, k_I, Y_LD, Y_DL, k_N, N, K_ct, K_N, K_F, mF, n);  // modifiers: Y_LD, Y_DL, N, mF
  _8e: => J; compartment*_8e_0(b_J, K_F, mF, n, k_K, Y_DD, J, k_H, J_p, k_p, Y_LD, Y_DL, Y_LL, k_N, N, K_ct, K_N);  // modifiers: mF, Y_DD, J_p, Y_LD, Y_DL, Y_LL, N
  _8f: => J_p; compartment*_8f_0(k_K, Y_DD, J, k_H, J_p, k_p, Y_LD, Y_DL, Y_LL, k_N, N, K_ct, K_N, K_F, mF, n);  // modifiers: Y_DD, J, Y_LD, Y_DL, Y_LL, N, mF
  _8g: => cl; compartment*_8g_0(k_T, J_p, K_J, K_F, mF, n, gamma_cl, k_N, N, K_ct, K_N, cl);  // modifiers: J_p, mF, N
  _8h: => mF; compartment*_8h_0(k_T, J_p, K_J, K_F, mF, n, k_N, N, K_ct, K_N, alpha_TH, mE);  // modifiers: J_p, N, mE
  _8i: => mE; compartment*_8i_0(k_gamma, K_gamma, cl, K_F, mF, n, gamma_mE, k_N, N, K_ct, K_N, mE, alpha_TH);  // modifiers: cl, mF, N
  _8j: => BP_b; compartment*_8j_0(k_N, N, K_ct, K_N, K_F, mF, n, BP_b);  // modifiers: N, mF
  _8k: N => ; compartment*_8k_0(delta, k_N, N, K_ct, K_N, K_F, mF, n, BP_b);  // modifiers: mF, BP_b

  // Unit definitions:
  unit length = metre;
  unit area = metre^2;
  unit volume = litre;
  unit time = second;
  unit substance = mole;
end
