// SBML level 2 version 4

function Y_LD_r_r_0(k_R_r, I_ir, b_D_r, k_I_r, I, Y_LD_r, Y_DD_r, Y_LL_r, k_N_r, N, K_ct_r, K_N_r, K_F_r, mF_r, n_r)
  -(k_R_r*(I_ir + b_D_r) + k_I_r*I)*Y_LD_r + k_I_r*I*Y_DD_r + k_R_r*(I_ir + b_D_r)*Y_LL_r - k_N_r*(N^K_ct_r/(N^K_ct_r + K_N_r))*(K_F_r/(mF_r^n_r + K_F_r))*Y_LD_r;
end

function J_r_r_0(b_J_r, K_F_r, mF_r, n_r, k_K_r, Y_DD_r, J_r, k_H_r, J_p_r, k_p_r, Y_LD_r, Y_DL_r, Y_LL_r, k_N_r, N, K_ct_r, K_N_r)
  b_J_r*(K_F_r/(mF_r^n_r + K_F_r)) - k_K_r*Y_DD_r*J_r + k_H_r*J_p_r + k_p_r*(Y_LD_r + Y_DL_r + Y_LL_r)*J_p_r - k_N_r*(N^K_ct_r/(N^K_ct_r + K_N_r))*(K_F_r/(mF_r^n_r + K_F_r))*J_r;
end

function Y_DL_n_r_0(k_R_n, I, b_D_n, k_I_n, I_ir, Y_DL_n, Y_DD_n, Y_LL_n, k_N_n, N, K_ct_n, K_N_n, K_F_n, mF_n, n_n)
  -(k_R_n*(I + b_D_n) + k_I_n*I_ir)*Y_DL_n + k_I_n*I_ir*Y_DD_n + k_R_n*(I + b_D_n)*Y_LL_n - k_N_n*(N^K_ct_n/(N^K_ct_n + K_N_n))*(K_F_n/(mF_n^n_n + K_F_n))*Y_DL_n;
end

function J_p_r_r_0(k_K_r, Y_DD_r, J_r, k_H_r, J_p_r, k_p_r, Y_LD_r, Y_DL_r, Y_LL_r, k_N_r, N, K_ct_r, K_N_r, K_F_r, mF_r, n_r)
  k_K_r*Y_DD_r*J_r - k_H_r*J_p_r - k_p_r*(Y_LD_r + Y_DL_r + Y_LL_r)*J_p_r - k_N_r*(N^K_ct_r/(N^K_ct_r + K_N_r))*(K_F_r/(mF_r^n_r + K_F_r))*J_p_r;
end

function cl_r_r_0(k_T_r, J_p_r, K_J_r, K_F_r, mF_r, n_r, gamma_cl_r, k_N_r, N, K_ct_r, K_N_r, cl_r)
  k_T_r*(J_p_r^2/(J_p_r^2 + K_J_r))*(K_F_r/(mF_r^n_r + K_F_r)) - (gamma_cl_r + k_N_r*(N^K_ct_r/(N^K_ct_r + K_N_r))*(K_F_r/(mF_r^n_r + K_F_r)))*cl_r;
end

function Y_DD_r_r_0(b_Y_r, K_F_r, mF_r, n_r, k_I_r, I, Y_DD_r, k_R_r, I_ir, b_D_r, Y_LD_r, Y_DL_r, k_N_r, N, K_ct_r, K_N_r)
  b_Y_r*(K_F_r/(mF_r^n_r + K_F_r)) - 2*k_I_r*I*Y_DD_r + k_R_r*(I_ir + b_D_r)*(Y_LD_r + Y_DL_r) - k_N_r*(N^K_ct_r/(N^K_ct_r + K_N_r))*(K_F_r/(mF_r^n_r + K_F_r))*Y_DD_r;
end

function BP_r_r_0(k_N_r, N, K_ct_r, K_N_r, K_F_r, mF_r, n_r, BP_r)
  k_N_r*(N^K_ct_r/(N^K_ct_r + K_N_r))*(K_F_r/(mF_r^n_r + K_F_r))*BP_r;
end

function Y_DL_r_r_0(k_R_r, I_ir, b_D_r, k_I_r, I, Y_DL_r, Y_DD_r, Y_LL_r, k_N_r, N, K_ct_r, K_N_r, K_F_r, mF_r, n_r)
  -(k_R_r*(I_ir + b_D_r) + k_I_r*I)*Y_DL_r + k_I_r*I*Y_DD_r + k_R_r*(I_ir + b_D_r)*Y_LL_r - k_N_r*(N^K_ct_r/(N^K_ct_r + K_N_r))*(K_F_r/(mF_r^n_r + K_F_r))*Y_DL_r;
end

function Y_DD_n_r_0(b_Y_n, K_F_n, mF_n, n_n, k_I_n, I_ir, Y_DD_n, k_R_n, I, b_D_n, Y_LD_n, Y_DL_n, k_N_n, N, K_ct_n, K_N_n)
  b_Y_n*(K_F_n/(mF_n^n_n + K_F_n)) - 2*k_I_n*I_ir*Y_DD_n + k_R_n*(I + b_D_n)*(Y_LD_n + Y_DL_n) - k_N_n*(N^K_ct_n/(N^K_ct_n + K_N_n))*(K_F_n/(mF_n^n_n + K_F_n))*Y_DD_n;
end

function Y_LD_n_r_0(k_R_n, I, b_D_n, k_I_n, I_ir, Y_LD_n, Y_DD_n, Y_LL_n, k_N_n, N, K_ct_n, K_N_n, K_F_n, mF_n, n_n)
  -(k_R_n*(I + b_D_n) + k_I_n*I_ir)*Y_LD_n + k_I_n*I_ir*Y_DD_n + k_R_n*(I + b_D_n)*Y_LL_n - k_N_n*(N^K_ct_n/(N^K_ct_n + K_N_n))*(K_F_n/(mF_n^n_n + K_F_n))*Y_LD_n;
end

function mF_n_r_0(k_T_n, J_p_n, K_J_n, K_F_n, mF_n, n_n, k_N_n, N, K_ct_n, K_N_n, alpha_TH_n, mE_n)
  k_T_n*(J_p_n^2/(J_p_n^2 + K_J_n))*(K_F_n/(mF_n^n_n + K_F_n)) - k_N_n*(N^K_ct_n/(N^K_ct_n + K_N_n))*(K_F_n/(mF_n^n_n + K_F_n))*mF_n - 2*alpha_TH_n*mF_n*mE_n;
end

function mE_r_r_0(k_gamma_r, K_gamma_r, cl_r, K_F_r, mF_r, n_r, gamma_mE_r, k_N_r, N, K_ct_r, K_N_r, mE_r, alpha_TH_r)
  k_gamma_r*(K_gamma_r/(cl_r^4 + K_gamma_r))*(K_F_r/(mF_r^n_r + K_F_r)) - (gamma_mE_r + k_N_r*(N^K_ct_r/(N^K_ct_r + K_N_r))*(K_F_r/(mF_r^n_r + K_F_r)))*mE_r - alpha_TH_r*mF_r*mE_r;
end

function Y_LL_r_r_0(k_R_r, I_ir, b_D_r, Y_LL_r, k_I_r, I, Y_LD_r, Y_DL_r, k_N_r, N, K_ct_r, K_N_r, K_F_r, mF_r, n_r)
  -2*k_R_r*(I_ir + b_D_r)*Y_LL_r + k_I_r*I*(Y_LD_r + Y_DL_r) - k_N_r*(N^K_ct_r/(N^K_ct_r + K_N_r))*(K_F_r/(mF_r^n_r + K_F_r))*Y_LL_r;
end

function mF_r_r_0(k_T_r, J_p_r, K_J_r, K_F_r, mF_r, n_r, k_N_r, N, K_ct_r, K_N_r, alpha_TH_r, mE_r)
  k_T_r*(J_p_r^2/(J_p_r^2 + K_J_r))*(K_F_r/(mF_r^n_r + K_F_r)) - k_N_r*(N^K_ct_r/(N^K_ct_r + K_N_r))*(K_F_r/(mF_r^n_r + K_F_r))*mF_r - 2*alpha_TH_r*mF_r*mE_r;
end

function J_n_r_0(b_J_n, K_F_n, mF_n, n_n, k_K_n, Y_DD_n, J_n, k_H_n, J_p_n, k_p_n, Y_LD_n, Y_DL_n, Y_LL_n, k_N_n, N, K_ct_n, K_N_n)
  b_J_n*(K_F_n/(mF_n^n_n + K_F_n)) - k_K_n*Y_DD_n*J_n + k_H_n*J_p_n + k_p_n*(Y_LD_n + Y_DL_n + Y_LL_n)*J_p_n - k_N_n*(N^K_ct_n/(N^K_ct_n + K_N_n))*(K_F_n/(mF_n^n_n + K_F_n))*J_n;
end

function J_p_n_r_0(k_K_n, Y_DD_n, J_n, k_H_n, J_p_n, k_p_n, Y_LD_n, Y_DL_n, Y_LL_n, k_N_n, N, K_ct_n, K_N_n, K_F_n, mF_n, n_n)
  k_K_n*Y_DD_n*J_n - k_H_n*J_p_n - k_p_n*(Y_LD_n + Y_DL_n + Y_LL_n)*J_p_n - k_N_n*(N^K_ct_n/(N^K_ct_n + K_N_n))*(K_F_n/(mF_n^n_n + K_F_n))*J_p_n;
end

function mE_n_r_0(k_gamma_n, K_gamma_n, cl_n, K_F_n, mF_n, n_n, gamma_mE_n, k_N_n, N, K_ct_n, K_N_n, mE_n, alpha_TH_n)
  k_gamma_n*(K_gamma_n/(cl_n^4 + K_gamma_n))*(K_F_n/(mF_n^n_n + K_F_n)) - (gamma_mE_n + k_N_n*(N^K_ct_n/(N^K_ct_n + K_N_n))*(K_F_n/(mF_n^n_n + K_F_n)))*mE_n - alpha_TH_n*mF_n*mE_n;
end

function BP_n_r_0(k_N_n, N, K_ct_n, K_N_n, K_F_n, mF_n, n_n, BP_n)
  k_N_n*(N^K_ct_n/(N^K_ct_n + K_N_n))*(K_F_n/(mF_n^n_n + K_F_n))*BP_n;
end

function Y_LL_n_r_0(k_R_n, I, b_D_n, Y_LL_n, k_I_n, I_ir, Y_LD_n, Y_DL_n, k_N_n, N, K_ct_n, K_N_n, K_F_n, mF_n, n_n)
  -2*k_R_n*(I + b_D_n)*Y_LL_n + k_I_n*I_ir*(Y_LD_n + Y_DL_n) - k_N_n*(N^K_ct_n/(N^K_ct_n + K_N_n))*(K_F_n/(mF_n^n_n + K_F_n))*Y_LL_n;
end

function cl_n_r_0(k_T_n, J_p_n, K_J_n, K_F_n, mF_n, n_n, gamma_cl_n, k_N_n, N, K_ct_n, K_N_n, cl_n)
  k_T_n*(J_p_n^2/(J_p_n^2 + K_J_n))*(K_F_n/(mF_n^n_n + K_F_n)) - (gamma_cl_n + k_N_n*(N^K_ct_n/(N^K_ct_n + K_N_n))*(K_F_n/(mF_n^n_n + K_F_n)))*cl_n;
end

function N_r_0(delta_r, k_N_r, N, K_ct_r, K_N_r, K_F_r, mF_r, n_r, BP_r, delta_n, k_N_n, K_ct_n, K_N_n, K_F_n, mF_n, n_n, BP_n)
  delta_r*k_N_r*(N^K_ct_r/(N^K_ct_r + K_N_r))*(K_F_r/(mF_r^n_r + K_F_r))*BP_r + delta_n*k_N_n*(N^K_ct_n/(N^K_ct_n + K_N_n))*(K_F_n/(mF_n^n_n + K_F_n))*BP_n;
end

model RedTA_NIRTA()

  // Compartments:
  compartment compartment = 1;

  // Species:
  species Y_DD_r in compartment = 0.001483946;
  species Y_LD_r in compartment = 0.1173885;
  species Y_DL_r in compartment = 0.0001899996;
  species Y_LL_r in compartment = 0.3489606;
  species J_r in compartment = 5.675497;
  species J_p_r in compartment = 6.684722e-5;
  species cl_r in compartment = 2.803873e-5;
  species mF_r in compartment = 6.744191e-5;
  species mE_r in compartment = 3.883744e-5;
  species Y_DD_n in compartment = 1.159746e-6;
  species Y_LD_n in compartment = 0.09317766;
  species Y_DL_n in compartment = 0.0004011055;
  species Y_LL_n in compartment = 0.4683956;
  species J_n in compartment = 16.99597;
  species J_p_n in compartment = 4.056993e-5;
  species cl_n in compartment = 5.478376e-7;
  species mF_n in compartment = 1.362073e-5;
  species mE_n in compartment = 1.001691e-5;
  species BP_r in compartment = 25634.9;
  species BP_n in compartment = 25856.2;
  species N in compartment = 5;

  // Parameters:
  b_Y_r = 0.4793974;
  k_I_r = 665.1006;
  k_R_r = 55.64675;
  b_J_r = 16.48859;
  k_K_r = 0.01645882;
  k_H_r = 1.575629e-8;
  k_p_r = 10.86909;
  k_T_r = 53.29397;
  K_J_r = 0.2910491;
  gamma_cl_r = 4.60822e-8;
  K_F_r = 1.582263e-6;
  n_r = 0.6669165;
  k_N_r = 0.9560732;
  K_N_r = 4.711605;
  alpha_TH_r = 1.284281e7;
  gamma_mE_r = 0.4389343;
  k_gamma_r = 0.05705098;
  K_gamma_r = 7.916857e-10;
  delta_r = 1.219771e-6;
  K_ct_r = 3.008509;
  b_D_r = 7.987253e-9;
  b_Y_n = 9.5720641;
  k_I_n = 567.6331;
  k_R_n = 5.30378e-10;
  b_J_n = 68.80855;
  k_K_n = 3.6065597;
  k_H_n = 5.947226e-5;
  k_p_n = 9.437628;
  k_T_n = 0.1051262;
  K_J_n = 0.00102053412;
  gamma_cl_n = 0.0002136543;
  K_F_n = 0.02250934;
  n_n = 0.2482894;
  k_N_n = 4.618487;
  K_N_n = 6.224949;
  alpha_TH_n = 5.740079e9;
  gamma_mE_n = 236.0747;
  k_gamma_n = 7.370205e-5;
  K_gamma_n = 1.330543e-6;
  delta_n = 1.06985e-6;
  K_ct_n = 6.343848;
  b_D_n = 3.901101;
  I = 0;
  I_ir = 0;
  ID_batch = 0;
  ID_batch_input = 1;

  // Reactions:
  Y_DD_r_r: => Y_DD_r; compartment*Y_DD_r_r_0(b_Y_r, K_F_r, mF_r, n_r, k_I_r, I, Y_DD_r, k_R_r, I_ir, b_D_r, Y_LD_r, Y_DL_r, k_N_r, N, K_ct_r, K_N_r);  // modifiers: mF_r, Y_LD_r, Y_DL_r, N
  Y_LD_r_r: => Y_LD_r; compartment*Y_LD_r_r_0(k_R_r, I_ir, b_D_r, k_I_r, I, Y_LD_r, Y_DD_r, Y_LL_r, k_N_r, N, K_ct_r, K_N_r, K_F_r, mF_r, n_r);  // modifiers: Y_DD_r, Y_LL_r, N, mF_r
  Y_DL_r_r: => Y_DL_r; compartment*Y_DL_r_r_0(k_R_r, I_ir, b_D_r, k_I_r, I, Y_DL_r, Y_DD_r, Y_LL_r, k_N_r, N, K_ct_r, K_N_r, K_F_r, mF_r, n_r);  // modifiers: Y_DD_r, Y_LL_r, N, mF_r
  Y_LL_r_r: => Y_LL_r; compartment*Y_LL_r_r_0(k_R_r, I_ir, b_D_r, Y_LL_r, k_I_r, I, Y_LD_r, Y_DL_r, k_N_r, N, K_ct_r, K_N_r, K_F_r, mF_r, n_r);  // modifiers: Y_LD_r, Y_DL_r, N, mF_r
  J_r_r: => J_r; compartment*J_r_r_0(b_J_r, K_F_r, mF_r, n_r, k_K_r, Y_DD_r, J_r, k_H_r, J_p_r, k_p_r, Y_LD_r, Y_DL_r, Y_LL_r, k_N_r, N, K_ct_r, K_N_r);  // modifiers: mF_r, Y_DD_r, J_p_r, Y_LD_r, Y_DL_r, Y_LL_r, N
  J_p_r_r: => J_p_r; compartment*J_p_r_r_0(k_K_r, Y_DD_r, J_r, k_H_r, J_p_r, k_p_r, Y_LD_r, Y_DL_r, Y_LL_r, k_N_r, N, K_ct_r, K_N_r, K_F_r, mF_r, n_r);  // modifiers: Y_DD_r, J_r, Y_LD_r, Y_DL_r, Y_LL_r, N, mF_r
  cl_r_r: => cl_r; compartment*cl_r_r_0(k_T_r, J_p_r, K_J_r, K_F_r, mF_r, n_r, gamma_cl_r, k_N_r, N, K_ct_r, K_N_r, cl_r);  // modifiers: J_p_r, mF_r, N
  mF_r_r: => mF_r; compartment*mF_r_r_0(k_T_r, J_p_r, K_J_r, K_F_r, mF_r, n_r, k_N_r, N, K_ct_r, K_N_r, alpha_TH_r, mE_r);  // modifiers: J_p_r, N, mE_r
  mE_r_r: => mE_r; compartment*mE_r_r_0(k_gamma_r, K_gamma_r, cl_r, K_F_r, mF_r, n_r, gamma_mE_r, k_N_r, N, K_ct_r, K_N_r, mE_r, alpha_TH_r);  // modifiers: cl_r, mF_r, N
  BP_r_r: => BP_r; compartment*BP_r_r_0(k_N_r, N, K_ct_r, K_N_r, K_F_r, mF_r, n_r, BP_r);  // modifiers: N, mF_r
  Y_DD_n_r: => Y_DD_n; compartment*Y_DD_n_r_0(b_Y_n, K_F_n, mF_n, n_n, k_I_n, I_ir, Y_DD_n, k_R_n, I, b_D_n, Y_LD_n, Y_DL_n, k_N_n, N, K_ct_n, K_N_n);  // modifiers: mF_n, Y_LD_n, Y_DL_n, N
  Y_LD_n_r: => Y_LD_n; compartment*Y_LD_n_r_0(k_R_n, I, b_D_n, k_I_n, I_ir, Y_LD_n, Y_DD_n, Y_LL_n, k_N_n, N, K_ct_n, K_N_n, K_F_n, mF_n, n_n);  // modifiers: Y_DD_n, Y_LL_n, N, mF_n
  Y_DL_n_r: => Y_DL_n; compartment*Y_DL_n_r_0(k_R_n, I, b_D_n, k_I_n, I_ir, Y_DL_n, Y_DD_n, Y_LL_n, k_N_n, N, K_ct_n, K_N_n, K_F_n, mF_n, n_n);  // modifiers: Y_DD_n, Y_LL_n, N, mF_n
  Y_LL_n_r: => Y_LL_n; compartment*Y_LL_n_r_0(k_R_n, I, b_D_n, Y_LL_n, k_I_n, I_ir, Y_LD_n, Y_DL_n, k_N_n, N, K_ct_n, K_N_n, K_F_n, mF_n, n_n);  // modifiers: Y_LD_n, Y_DL_n, N, mF_n
  J_n_r: => J_n; compartment*J_n_r_0(b_J_n, K_F_n, mF_n, n_n, k_K_n, Y_DD_n, J_n, k_H_n, J_p_n, k_p_n, Y_LD_n, Y_DL_n, Y_LL_n, k_N_n, N, K_ct_n, K_N_n);  // modifiers: mF_n, Y_DD_n, J_p_n, Y_LD_n, Y_DL_n, Y_LL_n, N
  J_p_n_r: => J_p_n; compartment*J_p_n_r_0(k_K_n, Y_DD_n, J_n, k_H_n, J_p_n, k_p_n, Y_LD_n, Y_DL_n, Y_LL_n, k_N_n, N, K_ct_n, K_N_n, K_F_n, mF_n, n_n);  // modifiers: Y_DD_n, J_n, Y_LD_n, Y_DL_n, Y_LL_n, N, mF_n
  cl_n_r: => cl_n; compartment*cl_n_r_0(k_T_n, J_p_n, K_J_n, K_F_n, mF_n, n_n, gamma_cl_n, k_N_n, N, K_ct_n, K_N_n, cl_n);  // modifiers: J_p_n, mF_n, N
  mF_n_r: => mF_n; compartment*mF_n_r_0(k_T_n, J_p_n, K_J_n, K_F_n, mF_n, n_n, k_N_n, N, K_ct_n, K_N_n, alpha_TH_n, mE_n);  // modifiers: J_p_n, N, mE_n
  mE_n_r: => mE_n; compartment*mE_n_r_0(k_gamma_n, K_gamma_n, cl_n, K_F_n, mF_n, n_n, gamma_mE_n, k_N_n, N, K_ct_n, K_N_n, mE_n, alpha_TH_n);  // modifiers: cl_n, mF_n, N
  BP_n_r: => BP_n; compartment*BP_n_r_0(k_N_n, N, K_ct_n, K_N_n, K_F_n, mF_n, n_n, BP_n);  // modifiers: N, mF_n
  N_r: N => ; compartment*N_r_0(delta_r, k_N_r, N, K_ct_r, K_N_r, K_F_r, mF_r, n_r, BP_r, delta_n, k_N_n, K_ct_n, K_N_n, K_F_n, mF_n, n_n, BP_n);  // modifiers: mF_r, BP_r, mF_n, BP_n

  // Unit definitions:
  unit length = metre;
  unit area = metre^2;
  unit volume = litre;
  unit time = second;
  unit substance = mole;
end
